Fri Oct 24 18:19:25 UTC 2014
ifort (IFORT) 12.0.4 20110427
Copyright (C) 1985-2011 Intel Corporation.  All rights reserved.

$PROB 1005 phase1 2 CMT like 1004 but diff. initial on V3
$INPUT C ID TIME SEQ=DROP EVID AMT DV SUBJ HOUR HEIGHT WT SEX AGE DOSE FED
$DATA ../../data/derived/phase1.csv IGNORE=C
$SUBROUTINE ADVAN4 TRANS4
$PK
 CL=THETA(1)*EXP(ETA(1)) * THETA(6)**SEX * (WT/70)**THETA(7)
 V2 =THETA(2)*EXP(ETA(2))
 KA=THETA(3)*EXP(ETA(3))
 Q  =THETA(4)
 V3=THETA(5)
 S2=V2

$ERROR
 Y=F*(1+ERR(1)) + ERR(2)
 IPRE=F
;<doc>
$THETA
(0,10,50)     ;CL        <parameter name='THETA1' latex='$\theta_1$' unit='$L/h$'    label='CL/F' model='$CL/F \sim \theta_6^{MALE} * (WT/70)^{\theta_7}$'>clearance</parameter>
(0,10,100)    ;V         <parameter name='THETA2' latex='$\theta_2$' unit='$L$'      label='Vc/F' model='$Vc/F \sim (WT/70)^{1}$'   >central volume</parameter>
(0,0.2, 5)    ;KA        <parameter name='THETA3' latex='$\theta_3$' unit='$h^{-1}$' label='Ka'                                     >absorption rate constant</parameter>
(0,10,50)     ;Q         <parameter name='THETA4' latex='$\theta_4$' unit='$L/h$'    label='Q/F'                                    >intercompartmental clearance</parameter>
(0,100,1000)  ;V3        <parameter name='THETA5' latex='$\theta_5$' unit='$L$'      label='Vp/F'                                   >peripheral volume</parameter>
(0,1,2)       ;SEX       <parameter name='THETA6' latex='$\theta_6$'                 label='Male.CL'                                >male effect on clearance</parameter>
(0,0.75,3)    ;WT on CL  <parameter name='THETA7' latex='$\theta_7$'                 label='WT.CL'                                  >weight effect on clearance</parameter>

$OMEGA BLOCK(3)
.1
.01 .1
.01 .01 .1

;<parameter name='OMEGA1.1' label='$\Omega^{1.1}CL/F$'>interindividual variability on clearance</parameter>
;<parameter name='OMEGA2.1' label='$\Omega^{2.1}Vc/F$'>interindividual clearance-volume covariance</parameter>
;<parameter name='OMEGA2.2' label='$\Omega^{2.2}Vc/F$'>interindividual variability on central volume</parameter>
;<parameter name='OMEGA3.1' label='$\Omega^{3.1}Ka$'>interindividual clearance-Ka covariance</parameter>
;<parameter name='OMEGA3.2' label='$\Omega^{3.2}Ka$'>interindividual volume-Ka covariance</parameter>
;<parameter name='OMEGA3.3' label='$\Omega^{3.3}Ka$'>interindividual variability on Ka</parameter>

$SIGMA 0.1 0.1

;<parameter name='SIGMA1.1' label='$\sigma^{1.1}prop$'>proportional error</parameter>
;<parameter name='SIGMA2.2' label='$\sigma^{2.2}prop$'>additive error</parameter>

$ESTIMATION MAXEVAL=9999 PRINT=5 NOABORT METHOD=1 INTER MSFO=./1005.msf
$COV PRINT=E
$TABLE NOPRINT FILE=./1005.tab ONEHEADER ID AMT TIME EVID PRED IPRE CWRES
$TABLE NOPRINT FILE=./1005par.tab ONEHEADER ID TIME CL Q V2 V3 KA ETA1 ETA2 ETA3

;<wiki model='CL/F (L/h) ~ theta_1 * theta_6 ^MALE * (WT/70)^theta_7  * e^eta_1'>apparent oral clearance</wiki>
;<wiki model='V_c /F (L) ~ theta_2 * (WT/70)^1 * e^eta_2'                       >central volume of distribution</wiki>
;<wiki model='K_a (h^-1 ) ~ theta_3 * e^eta_3'                                  >absorption rate constant</wiki>
;<wiki model='Q/F (L/h) ~ theta_4'                                              >intercompartmental clearance</wiki>
;<wiki model='V_p /F (L) ~ theta_5'                                             >peripheral volume of distribution</wiki>
;<wiki model='MALE_CL/F ~ theta_6'                                              >male effect on clearance</wiki>
;<wiki model = 'WT_CL/F ~ theta_7'                                              >weight effect on clearance</wiki>
;<wiki model='IIV_CL/F ~ Omega_1.1'                                             >interindividual variability of clearance</wiki>
;<wiki model='cov_CL,V ~ Omega_2.1'                                             >interindividual clearance-volume covariance</wiki>
;<wiki model='IIV_V_c /F ~ Omega_2.2'                                           >interindividual variability of central volume</wiki>
;<wiki model='cov_CL,Ka  ~ Omega_3.1'                                           >interindividual clearance-Ka covariance</wiki>
;<wiki model='cov_V,Ka  ~ Omega_3.2'                                            >interindividual volume-Ka covariance</wiki>
;<wiki model='IIV_K_a  ~ Omega_3.3'                                             >interindividual variability of Ka</wiki>
;<wiki model='err_prop ~ Sigma_1.1'                                             >proportional error</wiki>
;<wiki model='err_add ~ Sigma_2.2'                                              >additive error</wiki>
;</doc>

NM-TRAN MESSAGES
 WARNINGS AND ERRORS (IF ANY) FOR PROBLEM    1
 (WARNING  2) NM-TRAN INFERS THAT THE DATA ARE POPULATION.

1NONLINEAR MIXED EFFECTS MODEL PROGRAM (NONMEM) VERSION 7.3.0
 ORIGINALLY DEVELOPED BY STUART BEAL, LEWIS SHEINER, AND ALISON BOECKMANN
 CURRENT DEVELOPERS ARE ROBERT BAUER, ICON DEVELOPMENT SOLUTIONS,
 AND ALISON BOECKMANN. IMPLEMENTATION, EFFICIENCY, AND STANDARDIZATION
 PERFORMED BY NOUS INFOSYSTEMS.
 PROBLEM NO.:         1
 1005 phase1 2 CMT like 1004 but diff. initial on V3
 TOT. NO. OF OBS RECS:      510
 TOT. NO. OF INDIVIDUALS:     40
 TWO COMPARTMENT MODEL WITH FIRST-ORDER ABSORPTION (ADVAN4)
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 #TBLN:      1
 #METH: First Order Conditional Estimation with Interaction
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
 #TERM:
0MINIMIZATION SUCCESSFUL
 NO. OF FUNCTION EVALUATIONS USED:      556
 NO. OF SIG. DIGITS IN FINAL EST.:  3.0

 ETABAR IS THE ARITHMETIC MEAN OF THE ETA-ESTIMATES,
 AND THE P-VALUE IS GIVEN FOR THE NULL HYPOTHESIS THAT THE TRUE MEAN IS 0.

 ETABAR:        -6.9608E-04 -5.8378E-04  1.0117E-03
 SE:             7.1314E-02  4.6962E-02  3.1650E-02
 N:                      40          40          40

 P VAL.:         9.9221E-01  9.9008E-01  9.7450E-01

 ETAshrink(%):   1.2321E+00  2.1557E+00  6.0540E+00
 EBVshrink(%):   2.2413E+00  3.2006E+00  7.1322E+00
 EPSshrink(%):   7.0489E+00  7.0489E+00


 #TERE:
 Elapsed estimation time in seconds:     4.90
 Elapsed covariance time in seconds:     5.92

 ********************               FIRST ORDER CONDITIONAL ESTIMATION WITH INTERACTION              ********************
 #OBJT:**************                       MINIMUM VALUE OF OBJECTIVE FUNCTION                      ********************
 #OBJV:********************************************     2405.916       **************************************************

 ********************               FIRST ORDER CONDITIONAL ESTIMATION WITH INTERACTION              ********************
 ********************                             FINAL PARAMETER ESTIMATE                           ********************

 THETA - VECTOR OF FIXED EFFECTS PARAMETERS   *********
         TH 1      TH 2      TH 3      TH 4      TH 5      TH 6      TH 7
         9.51E+00  2.28E+01  7.14E-02  3.47E+00  1.13E+02  1.02E+00  1.19E+00

 OMEGA - COV MATRIX FOR RANDOM EFFECTS - ETAS  ********
            ETA1      ETA2      ETA3
 ETA1
+        2.14E-01
 ETA2
+        1.21E-01  9.45E-02
 ETA3
+       -1.16E-02 -3.72E-02  4.66E-02

 SIGMA - COV MATRIX FOR RANDOM EFFECTS - EPSILONS  ****
            EPS1      EPS2
 EPS1
+        4.92E-02
 EPS2
+        0.00E+00  2.02E-01

 OMEGA - CORR MATRIX FOR RANDOM EFFECTS - ETAS  *******
            ETA1      ETA2      ETA3
 ETA1
+        4.62E-01
 ETA2
+        8.49E-01  3.07E-01
 ETA3
+       -1.17E-01 -5.61E-01  2.16E-01

 SIGMA - CORR MATRIX FOR RANDOM EFFECTS - EPSILONS  ***
            EPS1      EPS2
 EPS1
+        2.22E-01
 EPS2
+        0.00E+00  4.49E-01

 ********************               FIRST ORDER CONDITIONAL ESTIMATION WITH INTERACTION              ********************
 ********************                            STANDARD ERROR OF ESTIMATE                          ********************

 THETA - VECTOR OF FIXED EFFECTS PARAMETERS   *********
         TH 1      TH 2      TH 3      TH 4      TH 5      TH 6      TH 7
         9.27E-01  2.18E+00  5.25E-03  5.36E-01  2.37E+01  1.14E-01  3.37E-01

 OMEGA - COV MATRIX FOR RANDOM EFFECTS - ETAS  ********
            ETA1      ETA2      ETA3
 ETA1
+        4.88E-02
 ETA2
+        3.19E-02  3.14E-02
 ETA3
+        2.01E-02  1.34E-02  1.62E-02

 SIGMA - COV MATRIX FOR RANDOM EFFECTS - EPSILONS  ****
            EPS1      EPS2
 EPS1
+        5.38E-03
 EPS2
+       .........  6.76E-02

 OMEGA - CORR MATRIX FOR RANDOM EFFECTS - ETAS  *******
            ETA1      ETA2      ETA3
 ETA1
+        5.28E-02
 ETA2
+        1.03E-01  5.10E-02
 ETA3
+        1.98E-01  2.33E-01  3.75E-02

 SIGMA - CORR MATRIX FOR RANDOM EFFECTS - EPSILONS  ***
            EPS1      EPS2
 EPS1
+        1.21E-02
 EPS2
+       .........  7.53E-02

 ********************               FIRST ORDER CONDITIONAL ESTIMATION WITH INTERACTION              ********************
 ********************                          COVARIANCE MATRIX OF ESTIMATE                         ********************

            TH 1      TH 2      TH 3      TH 4      TH 5      TH 6      TH 7      OM11      OM12      OM13      OM22      OM23
             OM33      SG11      SG12      SG22
 TH 1
+        8.59E-01
 TH 2
+        7.85E-01  4.74E+00
 TH 3
+        1.05E-03  6.68E-03  2.76E-05
 TH 4
+        6.30E-02  8.97E-01  2.22E-03  2.87E-01
 TH 5
+       -1.64E+00  5.32E+00 -3.04E-02  1.96E-01  5.64E+02
 TH 6
+       -4.11E-02 -2.52E-02 -1.05E-04 -1.07E-02  7.70E-01  1.30E-02
 TH 7
+       -1.76E-01  6.87E-02 -1.36E-04  1.55E-02 -6.34E-01  5.72E-04  1.13E-01
 OM11
+        6.09E-03  5.74E-03  3.21E-06  4.30E-03  2.74E-01  1.65E-03 -7.03E-03  2.39E-03
 OM12
+       -2.40E-04 -2.20E-02 -6.51E-05 -6.22E-03  1.61E-01  3.04E-04 -3.00E-03  7.80E-04  1.02E-03
 OM13
+       -5.36E-03 -1.96E-02 -6.77E-05 -4.56E-03 -5.51E-03 -5.35E-04  2.48E-03 -1.39E-04  1.36E-04  4.03E-04
 OM22
+       -4.36E-03 -2.45E-02 -7.82E-05 -7.80E-03  2.74E-02  5.99E-04  1.68E-05  2.62E-04  8.20E-04  2.10E-04  9.84E-04
 OM23
+       -2.58E-03 -1.12E-02 -2.76E-05 -2.25E-03  7.46E-02 -5.46E-05 -3.10E-04  1.52E-04  1.70E-04  1.61E-04  7.12E-05  1.80E-04
 OM33
+       -3.34E-03  4.79E-03  2.83E-05  3.07E-03 -3.42E-02 -3.37E-04  8.05E-05 -5.84E-05 -1.60E-04 -4.89E-05 -1.96E-04 -2.42E-05
          2.62E-04
 SG11
+       -5.19E-04 -3.13E-03 -1.03E-05 -6.29E-04  4.56E-02  1.21E-04  1.17E-04 -2.12E-05 -9.86E-06  5.31E-06 -2.60E-06 -3.05E-06
         -1.66E-05  2.90E-05
 SG12
+       ......... ......... ......... ......... ......... ......... ......... ......... ......... ......... ......... .........
         ......... ......... .........
 SG22
+        2.06E-02  1.91E-02  5.90E-05  2.54E-03 -4.24E-01 -1.05E-03 -5.00E-03  3.11E-04  2.71E-04 -1.66E-04  9.28E-05  3.63E-05
         -1.79E-04 -1.84E-04 .........  4.57E-03

 ********************               FIRST ORDER CONDITIONAL ESTIMATION WITH INTERACTION              ********************
 ********************                          CORRELATION MATRIX OF ESTIMATE                        ********************

            TH 1      TH 2      TH 3      TH 4      TH 5      TH 6      TH 7      OM11      OM12      OM13      OM22      OM23
             OM33      SG11      SG12      SG22
 TH 1
+        9.27E-01
 TH 2
+        3.89E-01  2.18E+00
 TH 3
+        2.16E-01  5.84E-01  5.25E-03
 TH 4
+        1.27E-01  7.68E-01  7.90E-01  5.36E-01
 TH 5
+       -7.46E-02  1.03E-01 -2.44E-01  1.54E-02  2.37E+01
 TH 6
+       -3.89E-01 -1.02E-01 -1.75E-01 -1.74E-01  2.84E-01  1.14E-01
 TH 7
+       -5.64E-01  9.37E-02 -7.67E-02  8.59E-02 -7.92E-02  1.49E-02  3.37E-01
 OM11
+        1.35E-01  5.40E-02  1.25E-02  1.65E-01  2.36E-01  2.97E-01 -4.28E-01  4.88E-02
 OM12
+       -8.12E-03 -3.17E-01 -3.89E-01 -3.64E-01  2.12E-01  8.36E-02 -2.79E-01  5.01E-01  3.19E-02
 OM13
+       -2.88E-01 -4.48E-01 -6.42E-01 -4.24E-01 -1.16E-02 -2.33E-01  3.67E-01 -1.42E-01  2.12E-01  2.01E-02
 OM22
+       -1.50E-01 -3.58E-01 -4.75E-01 -4.64E-01  3.67E-02  1.68E-01  1.59E-03  1.71E-01  8.20E-01  3.34E-01  3.14E-02
 OM23
+       -2.07E-01 -3.84E-01 -3.92E-01 -3.13E-01  2.34E-01 -3.57E-02 -6.85E-02  2.32E-01  3.97E-01  5.96E-01  1.69E-01  1.34E-02
 OM33
+       -2.22E-01  1.36E-01  3.33E-01  3.55E-01 -8.89E-02 -1.83E-01  1.48E-02 -7.38E-02 -3.10E-01 -1.51E-01 -3.86E-01 -1.12E-01
          1.62E-02
 SG11
+       -1.04E-01 -2.67E-01 -3.63E-01 -2.18E-01  3.57E-01  1.96E-01  6.44E-02 -8.05E-02 -5.74E-02  4.91E-02 -1.54E-02 -4.23E-02
         -1.90E-01  5.38E-03
 SG12
+       ......... ......... ......... ......... ......... ......... ......... ......... ......... ......... ......... .........
         ......... ......... .........
 SG22
+        3.29E-01  1.30E-01  1.66E-01  7.01E-02 -2.64E-01 -1.36E-01 -2.20E-01  9.43E-02  1.26E-01 -1.22E-01  4.38E-02  4.00E-02
         -1.63E-01 -5.06E-01 .........  6.76E-02
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
 ********************               FIRST ORDER CONDITIONAL ESTIMATION WITH INTERACTION              ********************
 ********************                      EIGENVALUES OF COR MATRIX OF ESTIMATE                     ********************

             1         2         3         4         5         6         7         8         9        10        11        12
             13        14        15
         2.91E-02  3.79E-02  1.08E-01  1.70E-01  2.16E-01  3.78E-01  4.25E-01  5.62E-01  8.31E-01  1.08E+00  1.24E+00  1.41E+00
          1.91E+00  2.44E+00  4.16E+00
 #CPUT: Total CPU Time in Seconds,       10.753
