Tue Apr  3 02:20:31 UTC 2012
$PROB 1001 phase1 1CMT
$INPUT C ID TIME SEQ=DROP EVID AMT DV
$DATA ../../data/derived/phase1.csv IGNORE=C
$SUBROUTINE ADVAN2 TRANS2
$PK
 CL=THETA(1)*EXP(ETA(1))
 V =THETA(2)*EXP(ETA(2))
 KA=THETA(3)*EXP(ETA(3))
 S2=V

$ERROR
 Y=F*EXP(ERR(1)) + ERR(2)
 IPRE=F

$THETA
(10)     ;CL
(10)      ;V
(0.2)     ;KA

$OMEGA 0.09 0.09 0.09
$SIGMA 0.09 0.1
$ESTIMATION MAXEVAL=9999 PRINT=5 NOABORT METHOD=1 INTER MSFO=./1001.msf
$COV PRINT=E
$TABLE NOPRINT FILE=./1001.tab ONEHEADER ID AMT TIME EVID PRED IPRE CWRES
$TABLE NOPRINT FILE=./1001par.tab ONEHEADER ID TIME CL V KA ETA1 ETA2 ETA3

NM-TRAN MESSAGES
 WARNINGS AND ERRORS (IF ANY) FOR PROBLEM    1
 (WARNING  2) NM-TRAN INFERS THAT THE DATA ARE POPULATION.

1NONLINEAR MIXED EFFECTS MODEL PROGRAM (NONMEM) VERSION 7.2.0
 ORIGINALLY DEVELOPED BY STUART BEAL, LEWIS SHEINER, AND ALISON BOECKMANN
 CURRENT DEVELOPERS ARE ROBERT BAUER, ICON DEVELOPMENT SOLUTIONS,
 AND ALISON BOECKMANN. IMPLEMENTATION, EFFICIENCY, AND STANDARDIZATION
 PERFORMED BY NOUS INFOSYSTEMS.
 PROBLEM NO.:         1
 1001 phase1 1CMT
 TOT. NO. OF OBS RECS:      510
 TOT. NO. OF INDIVIDUALS:     40
 ONE COMPARTMENT MODEL WITH FIRST-ORDER ABSORPTION (ADVAN2)
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 #TBLN:      1
 #METH: First Order Conditional Estimation with Interaction
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
 #TERM:
0MINIMIZATION SUCCESSFUL
 NO. OF FUNCTION EVALUATIONS USED:      195
 NO. OF SIG. DIGITS IN FINAL EST.:  3.4

 ETABAR IS THE ARITHMETIC MEAN OF THE ETA-ESTIMATES,
 AND THE P-VALUE IS GIVEN FOR THE NULL HYPOTHESIS THAT THE TRUE MEAN IS 0.

 ETABAR:        -2.9844E-03  5.6403E-03  2.5504E-03
 SE:             7.8863E-02  6.3677E-02  2.6193E-02

 P VAL.:         9.6981E-01  9.2942E-01  9.2243E-01

 ETAshrink(%):   7.4947E-01  1.0360E+01  1.4819E+01
 EPSshrink(%):   9.3358E+00  9.3358E+00


 #TERE:
 Elapsed estimation time in seconds:     2.47
 Elapsed covariance time in seconds:     2.70

 ********************               FIRST ORDER CONDITIONAL ESTIMATION WITH INTERACTION              ********************
 #OBJT:**************                       MINIMUM VALUE OF OBJECTIVE FUNCTION                      ********************
 #OBJV:********************************************     2526.399       **************************************************

 ********************               FIRST ORDER CONDITIONAL ESTIMATION WITH INTERACTION              ********************
 ********************                             FINAL PARAMETER ESTIMATE                           ********************

 THETA - VECTOR OF FIXED EFFECTS PARAMETERS   *********
         TH 1      TH 2      TH 3
         1.17E+01  1.46E+01  4.79E-02

 OMEGA - COV MATRIX FOR RANDOM EFFECTS - ETAS  ********
            ETA1      ETA2      ETA3
 ETA1
+        2.59E-01
 ETA2
+        0.00E+00  2.07E-01
 ETA3
+        0.00E+00  0.00E+00  3.88E-02

 SIGMA - COV MATRIX FOR RANDOM EFFECTS - EPSILONS  ****
            EPS1      EPS2
 EPS1
+        5.73E-02
 EPS2
+        0.00E+00  2.06E-01

 OMEGA - CORR MATRIX FOR RANDOM EFFECTS - ETAS  *******
            ETA1      ETA2      ETA3
 ETA1
+        5.09E-01
 ETA2
+        0.00E+00  4.55E-01
 ETA3
+        0.00E+00  0.00E+00  1.97E-01

 SIGMA - CORR MATRIX FOR RANDOM EFFECTS - EPSILONS  ***
            EPS1      EPS2
 EPS1
+        2.39E-01
 EPS2
+        0.00E+00  4.54E-01

 ********************               FIRST ORDER CONDITIONAL ESTIMATION WITH INTERACTION              ********************
 ********************                            STANDARD ERROR OF ESTIMATE                          ********************

 THETA - VECTOR OF FIXED EFFECTS PARAMETERS   *********
         TH 1      TH 2      TH 3
         1.02E+00  1.26E+00  1.96E-03

 OMEGA - COV MATRIX FOR RANDOM EFFECTS - ETAS  ********
            ETA1      ETA2      ETA3
 ETA1
+        4.68E-02
 ETA2
+       .........  4.01E-02
 ETA3
+       ......... .........  1.48E-02

 SIGMA - COV MATRIX FOR RANDOM EFFECTS - EPSILONS  ****
            EPS1      EPS2
 EPS1
+        5.92E-03
 EPS2
+       .........  6.52E-02

 OMEGA - CORR MATRIX FOR RANDOM EFFECTS - ETAS  *******
            ETA1      ETA2      ETA3
 ETA1
+        4.60E-02
 ETA2
+       .........  4.41E-02
 ETA3
+       ......... .........  3.75E-02

 SIGMA - CORR MATRIX FOR RANDOM EFFECTS - EPSILONS  ***
            EPS1      EPS2
 EPS1
+        1.24E-02
 EPS2
+       .........  7.18E-02

 ********************               FIRST ORDER CONDITIONAL ESTIMATION WITH INTERACTION              ********************
 ********************                          COVARIANCE MATRIX OF ESTIMATE                         ********************

            TH 1      TH 2      TH 3      OM11      OM12      OM13      OM22      OM23      OM33      SG11      SG12      SG22
 TH 1
+        1.03E+00
 TH 2
+        1.07E+00  1.60E+00
 TH 3
+        1.06E-03  8.45E-04  3.83E-06
 OM11
+        1.08E-02  6.25E-03 -3.47E-06  2.19E-03
 OM12
+       ......... ......... ......... ......... .........
 OM13
+       ......... ......... ......... ......... ......... .........
 OM22
+        5.36E-03  8.92E-03  2.10E-06  9.52E-04 ......... .........  1.61E-03
 OM23
+       ......... ......... ......... ......... ......... ......... ......... .........
 OM33
+       -5.40E-03 -4.78E-03 -6.92E-06  9.45E-06 ......... ......... -1.33E-04 .........  2.18E-04
 SG11
+        3.74E-04 -7.65E-04 -1.63E-06 -3.81E-05 ......... ......... -3.64E-05 ......... -2.10E-05  3.51E-05
 SG12
+       ......... ......... ......... ......... ......... ......... ......... ......... ......... ......... .........
 SG22
+        1.40E-02  1.02E-02  3.70E-05  4.39E-05 ......... .........  1.41E-04 ......... -7.92E-05 -1.89E-04 .........  4.25E-03

 ********************               FIRST ORDER CONDITIONAL ESTIMATION WITH INTERACTION              ********************
 ********************                          CORRELATION MATRIX OF ESTIMATE                        ********************

            TH 1      TH 2      TH 3      OM11      OM12      OM13      OM22      OM23      OM33      SG11      SG12      SG22
 TH 1
+        1.02E+00
 TH 2
+        8.36E-01  1.26E+00
 TH 3
+        5.32E-01  3.42E-01  1.96E-03
 OM11
+        2.27E-01  1.06E-01 -3.79E-02  4.68E-02
 OM12
+       ......... ......... ......... ......... .........
 OM13
+       ......... ......... ......... ......... ......... .........
 OM22
+        1.32E-01  1.76E-01  2.67E-02  5.07E-01 ......... .........  4.01E-02
 OM23
+       ......... ......... ......... ......... ......... ......... ......... .........
 OM33
+       -3.60E-01 -2.57E-01 -2.39E-01  1.37E-02 ......... ......... -2.25E-01 .........  1.48E-02
 SG11
+        6.21E-02 -1.02E-01 -1.41E-01 -1.37E-01 ......... ......... -1.53E-01 ......... -2.40E-01  5.92E-03
 SG12
+       ......... ......... ......... ......... ......... ......... ......... ......... ......... ......... .........
 SG22
+        2.11E-01  1.24E-01  2.90E-01  1.44E-02 ......... .........  5.39E-02 ......... -8.24E-02 -4.88E-01 .........  6.52E-02
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
 ********************               FIRST ORDER CONDITIONAL ESTIMATION WITH INTERACTION              ********************
 ********************                      EIGENVALUES OF COR MATRIX OF ESTIMATE                     ********************

             1         2         3         4         5         6         7         8
         7.19E-02  3.57E-01  5.22E-01  6.09E-01  8.90E-01  1.44E+00  1.56E+00  2.56E+00
