Fri May 25 20:10:08 UTC 2012
$PROB 1002 phase1 2 CMT
$INPUT C ID TIME SEQ=DROP EVID AMT DV
$DATA ../../data/derived/phase1.csv IGNORE=C
$SUBROUTINE ADVAN4 TRANS4
$PK
 CL=THETA(1)*EXP(ETA(1))
 V2 =THETA(2)*EXP(ETA(2))
 KA=THETA(3)*EXP(ETA(3))
 Q  =THETA(4)*EXP(ETA(4))
 V3=THETA(5) *EXP(ETA(5))
 S2=V2

$ERROR
 Y=F*EXP(ERR(1)) + ERR(2)
 IPRE=F

$THETA
(10)     ;CL
(10)      ;V
(0.2)     ;KA
(10)      ;Q
(10)      ;V3

$OMEGA 0.09 0.09 0.09 0.09 0.09
$SIGMA 0.09 0.1
$ESTIMATION MAXEVAL=9999 PRINT=5 NOABORT METHOD=1 INTER MSFO=./1002.msf
$COV PRINT=E
$TABLE NOPRINT FILE=./1002.tab ONEHEADER ID AMT TIME EVID PRED IPRE CWRES
$TABLE NOPRINT FILE=./1002par.tab ONEHEADER ID TIME CL Q V2 V3 KA ETA1 ETA2 ETA3 ETA4 ETA5

NM-TRAN MESSAGES
 WARNINGS AND ERRORS (IF ANY) FOR PROBLEM    1
 (WARNING  2) NM-TRAN INFERS THAT THE DATA ARE POPULATION.

1NONLINEAR MIXED EFFECTS MODEL PROGRAM (NONMEM) VERSION 7.2.0
 ORIGINALLY DEVELOPED BY STUART BEAL, LEWIS SHEINER, AND ALISON BOECKMANN
 CURRENT DEVELOPERS ARE ROBERT BAUER, ICON DEVELOPMENT SOLUTIONS,
 AND ALISON BOECKMANN. IMPLEMENTATION, EFFICIENCY, AND STANDARDIZATION
 PERFORMED BY NOUS INFOSYSTEMS.
 PROBLEM NO.:         1
 1002 phase1 2 CMT
 TOT. NO. OF OBS RECS:      510
 TOT. NO. OF INDIVIDUALS:     40
 TWO COMPARTMENT MODEL WITH FIRST-ORDER ABSORPTION (ADVAN4)
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 #TBLN:      1
 #METH: First Order Conditional Estimation with Interaction
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
 #TERM:
0MINIMIZATION TERMINATED
 DUE TO ROUNDING ERRORS (ERROR=134)
 NO. OF FUNCTION EVALUATIONS USED:     1202
 NO. OF SIG. DIGITS UNREPORTABLE
0PARAMETER ESTIMATE IS NEAR ITS BOUNDARY

 ETABAR IS THE ARITHMETIC MEAN OF THE ETA-ESTIMATES,
 AND THE P-VALUE IS GIVEN FOR THE NULL HYPOTHESIS THAT THE TRUE MEAN IS 0.

 ETABAR:        -2.5719E-03  2.3123E-02  5.4275E-03  3.8650E-06 -2.3486E-06
 SE:             7.8878E-02  8.6635E-02  2.5896E-02  2.0982E-06  9.4363E-07

 P VAL.:         9.7399E-01  7.8954E-01  8.3399E-01  6.5469E-02  1.2814E-02

 ETAshrink(%):   7.5156E-01  1.1409E+01  1.4901E+01  9.9999E+01  9.9799E+01
 EPSshrink(%):   9.1703E+00  9.1703E+00


 #TERE:
 Elapsed estimation time in seconds:    26.13

 ********************               FIRST ORDER CONDITIONAL ESTIMATION WITH INTERACTION              ********************
 #OBJT:**************                       MINIMUM VALUE OF OBJECTIVE FUNCTION                      ********************
 #OBJV:********************************************     2525.965       **************************************************

 ********************               FIRST ORDER CONDITIONAL ESTIMATION WITH INTERACTION              ********************
 ********************                             FINAL PARAMETER ESTIMATE                           ********************

 THETA - VECTOR OF FIXED EFFECTS PARAMETERS   *********
         TH 1      TH 2      TH 3      TH 4      TH 5
         1.17E+01  1.05E+01  4.79E-02  1.15E+06  3.62E+00

 OMEGA - COV MATRIX FOR RANDOM EFFECTS - ETAS  ********
            ETA1      ETA2      ETA3      ETA4      ETA5
 ETA1
+        2.59E-01
 ETA2
+        0.00E+00  3.92E-01
 ETA3
+        0.00E+00  0.00E+00  3.80E-02
 ETA4
+        0.00E+00  0.00E+00  0.00E+00  1.79E+00
 ETA5
+        0.00E+00  0.00E+00  0.00E+00  0.00E+00  9.00E-06

 SIGMA - COV MATRIX FOR RANDOM EFFECTS - EPSILONS  ****
            EPS1      EPS2
 EPS1
+        5.72E-02
 EPS2
+        0.00E+00  2.07E-01

 OMEGA - CORR MATRIX FOR RANDOM EFFECTS - ETAS  *******
            ETA1      ETA2      ETA3      ETA4      ETA5
 ETA1
+        5.09E-01
 ETA2
+        0.00E+00  6.26E-01
 ETA3
+        0.00E+00  0.00E+00  1.95E-01
 ETA4
+        0.00E+00  0.00E+00  0.00E+00  1.34E+00
 ETA5
+        0.00E+00  0.00E+00  0.00E+00  0.00E+00  3.00E-03

 SIGMA - CORR MATRIX FOR RANDOM EFFECTS - EPSILONS  ***
            EPS1      EPS2
 EPS1
+        2.39E-01
 EPS2
+        0.00E+00  4.55E-01
