Wed Oct 23 22:21:09 UTC 2013
$PROB 1003 phase1 2 CMT like 1002 but no eta on Q/v3 and no + err
$INPUT C ID TIME SEQ=DROP EVID AMT DV
$DATA ../../data/derived/phase1.csv IGNORE=C
$SUBROUTINE ADVAN4 TRANS4
$PK
 CL=THETA(1)*EXP(ETA(1))
 V2 =THETA(2)*EXP(ETA(2))
 KA=THETA(3)*EXP(ETA(3))
 Q  =THETA(4);*EXP(ETA(4))
 V3=THETA(5); *EXP(ETA(5))
 S2=V2

$ERROR
 Y=F*EXP(ERR(1)); + ERR(2)
 IPRE=F

$THETA
(10)     ;CL
(10)      ;V
(0.2)     ;KA
(10)      ;Q
(10)      ;V3

$OMEGA 0.09 0.09 0.09 ;0.09 0.09
$SIGMA 0.09 ;0.1
$ESTIMATION MAXEVAL=9999 PRINT=5 NOABORT METHOD=1 INTER MSFO=./1003.msf
$COV PRINT=E
$TABLE NOPRINT FILE=./1003.tab ONEHEADER ID AMT TIME EVID PRED IPRE CWRES
$TABLE NOPRINT FILE=./1003par.tab ONEHEADER ID TIME CL Q V2 V3 KA ETA1 ETA2 ETA3

NM-TRAN MESSAGES
 WARNINGS AND ERRORS (IF ANY) FOR PROBLEM    1
 (WARNING  2) NM-TRAN INFERS THAT THE DATA ARE POPULATION.

1NONLINEAR MIXED EFFECTS MODEL PROGRAM (NONMEM) VERSION 7.2.0
 ORIGINALLY DEVELOPED BY STUART BEAL, LEWIS SHEINER, AND ALISON BOECKMANN
 CURRENT DEVELOPERS ARE ROBERT BAUER, ICON DEVELOPMENT SOLUTIONS,
 AND ALISON BOECKMANN. IMPLEMENTATION, EFFICIENCY, AND STANDARDIZATION
 PERFORMED BY NOUS INFOSYSTEMS.
 PROBLEM NO.:         1
 1003 phase1 2 CMT like 1002 but no eta on Q/v3 and no + err
 TOT. NO. OF OBS RECS:      510
 TOT. NO. OF INDIVIDUALS:     40
 TWO COMPARTMENT MODEL WITH FIRST-ORDER ABSORPTION (ADVAN4)
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 #TBLN:      1
 #METH: First Order Conditional Estimation with Interaction
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
 #TERM:
0MINIMIZATION TERMINATED
 DUE TO PROXIMITY OF LAST ITERATION EST. TO A VALUE
 AT WHICH THE OBJ. FUNC. IS INFINITE (ERROR=136)
0AT THE LAST COMPUTED INFINITE VALUE OF THE OBJ. FUNCT.:

0PRED EXIT CODE = 1
0INDIVIDUAL NO.       1   ID= 1.00000000000000E+00   (WITHIN-INDIVIDUAL) DATA REC NO.   1
 THETA=
  1.11E+01   1.32E+01   4.36E-02   7.22E-01  -9.73E-03
 OCCURS DURING SEARCH FOR ETA AT INITIAL VALUE, ETA=0
 ERROR IN TRANS4 ROUTINE: V3  IS NEGATIVE

 NO. OF FUNCTION EVALUATIONS USED:     1063
 NO. OF SIG. DIGITS UNREPORTABLE

 ETABAR IS THE ARITHMETIC MEAN OF THE ETA-ESTIMATES,
 AND THE P-VALUE IS GIVEN FOR THE NULL HYPOTHESIS THAT THE TRUE MEAN IS 0.

 ETABAR:         7.6912E-05  1.2101E-02  6.5981E-03
 SE:             7.7971E-02  6.4682E-02  3.7617E-02

 P VAL.:         9.9921E-01  8.5159E-01  8.6077E-01

 ETAshrink(%):   2.3332E-01  9.2594E+00  5.7326E+00
 EPSshrink(%):   9.4857E+00


 #TERE:
 Elapsed estimation time in seconds:    23.20

 ********************               FIRST ORDER CONDITIONAL ESTIMATION WITH INTERACTION              ********************
 #OBJT:**************                       MINIMUM VALUE OF OBJECTIVE FUNCTION                      ********************
 #OBJV:********************************************     2570.474       **************************************************

 ********************               FIRST ORDER CONDITIONAL ESTIMATION WITH INTERACTION              ********************
 ********************                             FINAL PARAMETER ESTIMATE                           ********************

 THETA - VECTOR OF FIXED EFFECTS PARAMETERS   *********
         TH 1      TH 2      TH 3      TH 4      TH 5
         1.11E+01  1.32E+01  4.36E-02  7.22E-01  2.74E-04

 OMEGA - COV MATRIX FOR RANDOM EFFECTS - ETAS  ********
            ETA1      ETA2      ETA3
 ETA1
+        2.51E-01
 ETA2
+        0.00E+00  2.08E-01
 ETA3
+        0.00E+00  0.00E+00  6.53E-02

 SIGMA - COV MATRIX FOR RANDOM EFFECTS - EPSILONS  ****
            EPS1
 EPS1
+        7.51E-02

 OMEGA - CORR MATRIX FOR RANDOM EFFECTS - ETAS  *******
            ETA1      ETA2      ETA3
 ETA1
+        5.01E-01
 ETA2
+        0.00E+00  4.57E-01
 ETA3
+        0.00E+00  0.00E+00  2.56E-01

 SIGMA - CORR MATRIX FOR RANDOM EFFECTS - EPSILONS  ***
            EPS1
 EPS1
+        2.74E-01
