Thu Sep 27 20:37:28 UTC 2012
$PROB 1004 phase1 2 CMT like 1003 but better bounds
$INPUT C ID TIME SEQ=DROP EVID AMT DV
$DATA ../../data/derived/phase1.csv IGNORE=C
$SUBROUTINE ADVAN4 TRANS4
$PK
 CL=THETA(1)*EXP(ETA(1))
 V2 =THETA(2)*EXP(ETA(2))
 KA=THETA(3)*EXP(ETA(3))
 Q  =THETA(4);*EXP(ETA(4))
 V3=THETA(5); *EXP(ETA(5))
 S2=V2

$ERROR
 Y=F*EXP(ERR(1)); + ERR(2)
 IPRE=F

$THETA
(0,10,50)     ;CL
(0,10,100)      ;V
(0,0.2, 5)     ;KA
(0,10,50)      ;Q
(0,10,1000)      ;V3

$OMEGA 0.09 0.09 0.09 ;0.09 0.09
$SIGMA 0.09 ;0.1
$ESTIMATION MAXEVAL=9999 PRINT=5 NOABORT METHOD=1 INTER MSFO=./1004.msf
$COV PRINT=E
$TABLE NOPRINT FILE=./1004.tab ONEHEADER ID AMT TIME EVID PRED IPRE CWRES
$TABLE NOPRINT FILE=./1004par.tab ONEHEADER ID TIME CL Q V2 V3 KA ETA1 ETA2 ETA3

NM-TRAN MESSAGES
 WARNINGS AND ERRORS (IF ANY) FOR PROBLEM    1
 (WARNING  2) NM-TRAN INFERS THAT THE DATA ARE POPULATION.

1NONLINEAR MIXED EFFECTS MODEL PROGRAM (NONMEM) VERSION 7.2.0
 ORIGINALLY DEVELOPED BY STUART BEAL, LEWIS SHEINER, AND ALISON BOECKMANN
 CURRENT DEVELOPERS ARE ROBERT BAUER, ICON DEVELOPMENT SOLUTIONS,
 AND ALISON BOECKMANN. IMPLEMENTATION, EFFICIENCY, AND STANDARDIZATION
 PERFORMED BY NOUS INFOSYSTEMS.
 PROBLEM NO.:         1
 1004 phase1 2 CMT like 1003 but better bounds
 TOT. NO. OF OBS RECS:      510
 TOT. NO. OF INDIVIDUALS:     40
 TWO COMPARTMENT MODEL WITH FIRST-ORDER ABSORPTION (ADVAN4)
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 #TBLN:      1
 #METH: First Order Conditional Estimation with Interaction
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
 #TERM:
0MINIMIZATION SUCCESSFUL
 NO. OF FUNCTION EVALUATIONS USED:      384
 NO. OF SIG. DIGITS IN FINAL EST.:  3.8

 ETABAR IS THE ARITHMETIC MEAN OF THE ETA-ESTIMATES,
 AND THE P-VALUE IS GIVEN FOR THE NULL HYPOTHESIS THAT THE TRUE MEAN IS 0.

 ETABAR:         4.7515E-05  1.2828E-02  6.6802E-03
 SE:             7.7976E-02  6.5812E-02  3.7611E-02

 P VAL.:         9.9951E-01  8.4546E-01  8.5903E-01

 ETAshrink(%):   2.3211E-01  9.2938E+00  5.7402E+00
 EPSshrink(%):   9.4769E+00


 #TERE:
 Elapsed estimation time in seconds:     6.92
 Elapsed covariance time in seconds:     5.35

 ********************               FIRST ORDER CONDITIONAL ESTIMATION WITH INTERACTION              ********************
 #OBJT:**************                       MINIMUM VALUE OF OBJECTIVE FUNCTION                      ********************
 #OBJV:********************************************     2570.450       **************************************************

 ********************               FIRST ORDER CONDITIONAL ESTIMATION WITH INTERACTION              ********************
 ********************                             FINAL PARAMETER ESTIMATE                           ********************

 THETA - VECTOR OF FIXED EFFECTS PARAMETERS   *********
         TH 1      TH 2      TH 3      TH 4      TH 5
         1.11E+01  1.30E+01  4.36E-02  4.88E+01  2.19E-01

 OMEGA - COV MATRIX FOR RANDOM EFFECTS - ETAS  ********
            ETA1      ETA2      ETA3
 ETA1
+        2.51E-01
 ETA2
+        0.00E+00  2.16E-01
 ETA3
+        0.00E+00  0.00E+00  6.53E-02

 SIGMA - COV MATRIX FOR RANDOM EFFECTS - EPSILONS  ****
            EPS1
 EPS1
+        7.51E-02

 OMEGA - CORR MATRIX FOR RANDOM EFFECTS - ETAS  *******
            ETA1      ETA2      ETA3
 ETA1
+        5.01E-01
 ETA2
+        0.00E+00  4.65E-01
 ETA3
+        0.00E+00  0.00E+00  2.56E-01

 SIGMA - CORR MATRIX FOR RANDOM EFFECTS - EPSILONS  ***
            EPS1
 EPS1
+        2.74E-01

 ********************               FIRST ORDER CONDITIONAL ESTIMATION WITH INTERACTION              ********************
 ********************                            STANDARD ERROR OF ESTIMATE                          ********************

 THETA - VECTOR OF FIXED EFFECTS PARAMETERS   *********
         TH 1      TH 2      TH 3      TH 4      TH 5
         9.18E-01  1.33E+00  2.00E-03  3.22E+01  2.83E-01

 OMEGA - COV MATRIX FOR RANDOM EFFECTS - ETAS  ********
            ETA1      ETA2      ETA3
 ETA1
+        4.84E-02
 ETA2
+       .........  4.87E-02
 ETA3
+       ......... .........  1.91E-02

 SIGMA - COV MATRIX FOR RANDOM EFFECTS - EPSILONS  ****
            EPS1
 EPS1
+        7.73E-03

 OMEGA - CORR MATRIX FOR RANDOM EFFECTS - ETAS  *******
            ETA1      ETA2      ETA3
 ETA1
+        4.84E-02
 ETA2
+       .........  5.24E-02
 ETA3
+       ......... .........  3.73E-02

 SIGMA - CORR MATRIX FOR RANDOM EFFECTS - EPSILONS  ***
            EPS1
 EPS1
+        1.41E-02

 ********************               FIRST ORDER CONDITIONAL ESTIMATION WITH INTERACTION              ********************
 ********************                          COVARIANCE MATRIX OF ESTIMATE                         ********************

            TH 1      TH 2      TH 3      TH 4      TH 5      OM11      OM12      OM13      OM22      OM23      OM33      SG11
 TH 1
+        8.43E-01
 TH 2
+        9.32E-01  1.76E+00
 TH 3
+        6.74E-04  9.91E-04  4.02E-06
 TH 4
+       -2.50E+01 -3.99E+01 -2.83E-02  1.03E+03
 TH 5
+       -1.00E-01 -2.75E-01 -1.04E-04  4.61E+00  7.99E-02
 OM11
+        1.58E-02  1.36E-02  1.35E-05 -6.22E-01  2.24E-03  2.34E-03
 OM12
+       ......... ......... ......... ......... ......... ......... .........
 OM13
+       ......... ......... ......... ......... ......... ......... ......... .........
 OM22
+        8.20E-03 -2.52E-03 -2.90E-06 -2.37E-01  7.17E-03  1.25E-03 ......... .........  2.37E-03
 OM23
+       ......... ......... ......... ......... ......... ......... ......... ......... ......... .........
 OM33
+       -3.69E-03 -8.48E-03 -2.49E-05  2.02E-01  1.06E-03 -1.18E-04 ......... ......... -2.61E-05 .........  3.64E-04
 SG11
+        6.79E-04 -3.14E-03 -6.27E-06  9.74E-02  4.04E-04 -9.58E-05 ......... ......... -8.65E-06 .........  4.94E-05  5.98E-05

 ********************               FIRST ORDER CONDITIONAL ESTIMATION WITH INTERACTION              ********************
 ********************                          CORRELATION MATRIX OF ESTIMATE                        ********************

            TH 1      TH 2      TH 3      TH 4      TH 5      OM11      OM12      OM13      OM22      OM23      OM33      SG11
 TH 1
+        9.18E-01
 TH 2
+        7.64E-01  1.33E+00
 TH 3
+        3.66E-01  3.72E-01  2.00E-03
 TH 4
+       -8.46E-01 -9.33E-01 -4.40E-01  3.22E+01
 TH 5
+       -3.86E-01 -7.32E-01 -1.84E-01  5.07E-01  2.83E-01
 OM11
+        3.55E-01  2.11E-01  1.39E-01 -3.99E-01  1.64E-01  4.84E-02
 OM12
+       ......... ......... ......... ......... ......... ......... .........
 OM13
+       ......... ......... ......... ......... ......... ......... ......... .........
 OM22
+        1.83E-01 -3.89E-02 -2.97E-02 -1.52E-01  5.21E-01  5.32E-01 ......... .........  4.87E-02
 OM23
+       ......... ......... ......... ......... ......... ......... ......... ......... ......... .........
 OM33
+       -2.11E-01 -3.35E-01 -6.53E-01  3.29E-01  1.97E-01 -1.28E-01 ......... ......... -2.80E-02 .........  1.91E-02
 SG11
+        9.56E-02 -3.05E-01 -4.05E-01  3.92E-01  1.85E-01 -2.56E-01 ......... ......... -2.30E-02 .........  3.35E-01  7.73E-03
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
 ********************               FIRST ORDER CONDITIONAL ESTIMATION WITH INTERACTION              ********************
 ********************                      EIGENVALUES OF COR MATRIX OF ESTIMATE                     ********************

             1         2         3         4         5         6         7         8         9
         1.13E-03  5.32E-02  1.71E-01  4.00E-01  4.13E-01  8.70E-01  1.43E+00  1.89E+00  3.77E+00
